// COMSOL Multiphysics 6.4.0.293 model "model.mph"
// Outline of the model tree

Selections
  leftWall: Box
    entitydim = 2
    xmin = -0.400111925333
    xmax = -0.4
    ymin = -1.22580142744
    ymax = 15.1290071372
    zmin = 0
    zmax = 0.1
    condition = allvertices
  rightWall: Box
    entitydim = 2
    xmin = 10.7924213921
    xmax = 10.7926452428
    ymin = -1.22580142744
    ymax = 15.1290071372
    zmin = 0
    zmax = 0.1
    condition = allvertices

Geometry
  geom1 "Geometry 1" (3D, length unit µm)
    wp1: WorkPlane
      imp1: Import
        type = dxf
        filename = outputs/dxf/unit_cell.dxf
        lengthunittype = dxf
        virtualgeometrytype = dxf
        objectstoimporttype = dxf
        layerstype = dxf
        netstype = dxf
        padstype = dxf
        padattrtag = imp1.pad
        componentsstype = dxf
        compattrtag = imp1.component
        cellstype = dxf
        arcrecognitiontype = dxf
        simplifytype = dxf
        repairgeom = off
        netselectionstypedom = dxf
        ecadpreviewlayertype = dxf
        ecadpreviewnettype = dxf
      dif1: Difference | input = imp1(1); input2 = imp1(2)
      bbox1: BoxSelection
        xmin = -0.399690186667
        xmax = 2.69782351602
        ymin = -0.4
        ymax = 0.963871601197
        entitydim = 0
      bbox2: BoxSelection | xmin = -0.399690186667; xmax = 2.69782351602; ymin = 2.0361283988; ymax = 3.4; entitydim = 0
      unisel1: UnionSelection | input = {bbox1, bbox2}; entitydim = 0
      fil1: Fillet | point = selection unisel1; radius = 0.2
      arr1: Array
        input = fil1
        size = {4, 3}
        fullsize = {4, 3}
        displ = {2.69813332936, 5.45160285488}
        indexattrtag = arr1.index
        indexattrtags = {arr1.index1, arr1.index2}
      uni_arr: Union | input = arr1; intbnd = off; edge = all
    ext1: Extrude | workplane = wp1; input = wp1.uni_arr; distance = 0.1
    fin: Finalize "Form Union"

Materials
  mat1: Common "Material 1" on all domains
    def: def "Basic"
      youngsmodulus = 200000000000.0
      poissonsratio = 0.3
      density = 7800

Physics
  solid: SolidMechanics on all domains
    dependent variable u = {u, v, w}
    lemm1: LinearElasticModel "Linear Elastic Material 1" (default)
    free1: Free (default)
    init1: init "Initial Values 1" (default)
    fix1: Fixed "Fixed Constraint 1" on selection leftWall
    load1: BoundaryLoad on selection rightWall | forceType = ForceArea; forceReferenceArea = {300, 0, 0}

Mesh
  mesh1 "Mesh 1" (physics-controlled)

Studies
  std1 "Study 1"
    stat: Stationary

Solver configurations
  sol1 "Solution 1" (study std1)
    v1: Variables "Dependent Variables 1"
    s1: Stationary "Stationary Solver 1"
      dDef: Direct
      fcDef: FullyCoupled

Datasets
  dset1: Solution | solution = sol1